*Heading
** Job name: EllipticalModel1 Model name: Elliptical_6Inclusions_Model2
** Generated by: Abaqus/CAE Student Edition 6.9-2
*Preprint, echo=NO, model=NO, history=NO, contact=NO
**
** PARTS
**
*Part, name=RVE2DComposite
*Node
      1,   19.8579884,   25.0662823
      2,           0.,   25.0662823
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*Element, type=CPS3
  1,  18, 152,  87
  2, 150,  98,  19
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*Nset, nset=_PickedSet3, internal
  1,  4,  5,  8,  9, 10
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*Elset, elset=_PickedSet3, internal, generate
 642,  704,    1
*Nset, nset=_PickedSet4, internal
   1,   2,   3,   4,   5,   6
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*Elset, elset=_PickedSet4, internal, generate
   1,  641,    1
** Section: matrixSection
*Solid Section, elset=_PickedSet4, material=matrix
,
** Section: fibreSection
*Solid Section, elset=_PickedSet3, material=fibre
,
*End Part
**
**
** ASSEMBLY
**
*Assembly, name=Assembly
**
*Instance, name=RVE2DComposite, part=RVE2DComposite
*End Instance
**
*End Assembly
**
** MATERIALS
**
*Material, name=fibre
*Material, name=matrix
