*Heading
** Job name: TIMCompCircularSim Model name: Model-1
** Generated by: Abaqus/CAE Student Edition 6.13-2
*Preprint, echo=NO, model=NO, history=NO, contact=NO
**
** PARTS
**
*Part, name=TIMCompCirc
*Node
      1,   2.07179666,           0.
      2,          16.,           1.
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*Element, type=CPS3
  1,   1,  15,  10
  2,  91,  15,  16
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*Nset, nset=Set-1
   1,   2,   3,   4,   5,   6
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*Elset, elset=Set-1, generate
   1,  800,    1
*Nset, nset=Set-2
   1,   2,   3,   6,   7,   8
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*Elset, elset=Set-2, generate
 801,  938,    1
** Section: matrixSection
*Solid Section, elset=Set-1, material=matrix
,
** Section: fibreSection
*Solid Section, elset=Set-2, material=fibre
,
*End Part
**
**
** ASSEMBLY
**
*Assembly, name=Assembly
**
*Instance, name=TIMCompCirc-1, part=TIMCompCirc
*End Instance
**
*End Assembly
**
** MATERIALS
**
*Material, name=fibre
*Elastic
 4.5e+11, 0.15
*Material, name=matrix
*Elastic
 7e+10, 0.33
** ----------------------------------------------------------------
**
** STEP: loadHere
**
*Step, name=loadHere, nlgeom=NO
*Static
1., 1., 1e-05, 1.
**
** OUTPUT REQUESTS
**
*Restart, write, frequency=0
**
** FIELD OUTPUT: F-Output-1
**
*Output, field, variable=PRESELECT
**
** HISTORY OUTPUT: H-Output-1
**
*Output, history, variable=PRESELECT
*End Step
