*Heading
** Job name: 2D-TriArrayWithPeriodicity Model name: Model-1
** Generated by: Abaqus/CAE 6.10-1
*Preprint, echo=NO, model=NO, history=NO, contact=NO
**
** PARTS
**
*Part, name=RVE2DComposite
*Node
      1,           0.,   40.8333015
      2,          7.5,   33.3333015
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*Element, type=CPS3
   1,  760,   21,  494
   2, 1283, 1121, 1051
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*Nset, nset=Frontface
   9,  10,  11,  12, 131, 132
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*Elset, elset=Frontface
  157,  160,  172,  181,  182,  186
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*Nset, nset=_PickedSet4, internal
    1,    2,    3,    5,    6,    7
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*Elset, elset=_PickedSet4, internal, generate
 3056,  5524,     1
*Nset, nset=_PickedSet5, internal
    1,    2,    3,    4,    5,    6
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*Elset, elset=_PickedSet5, internal, generate
    1,  3055,     1
** Section: matrixSection
*Solid Section, elset=_PickedSet5, material=matrix
,
** Section: fibreSection
*Solid Section, elset=_PickedSet4, material=fibre
,
*End Part
**
**
** ASSEMBLY
**
*Assembly, name=Assembly
**
*Instance, name=RVE2DComposite, part=RVE2DComposite
*End Instance
**
*Nset, nset=_PickedSet8, internal, instance=RVE2DComposite
   1,   3,   4,  17,  43,  44
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*Elset, elset=_PickedSet8, internal, instance=RVE2DComposite
   95,  123,  126,  131,  339,  375
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*Elset, elset=__PickedSurf9_S2, internal, instance=RVE2DComposite
  157,  160,  172,  181,  182,  186
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*Elset, elset=__PickedSurf9_S1, internal, instance=RVE2DComposite
  845, 3497
*Surface, type=ELEMENT, name=_PickedSurf9, internal
__PickedSurf9_S2, S2
__PickedSurf9_S1, S1
*End Assembly
**
** MATERIALS
**
*Material, name=fibre
*Elastic
 7.35e+10, 0.2
*Material, name=matrix
*Elastic
 1.38e+09, 0.4
** ----------------------------------------------------------------
**
** STEP: Step-1
**
*Step, name=Step-1
*Static
1., 1., 1e-05, 1.
**
** BOUNDARY CONDITIONS
**
** Name: FixedSupport Type: Displacement/Rotation
*Boundary
_PickedSet8, 1, 1
**
** LOADS
**
** Name: ApplyPressure   Type: Pressure
*Dsload
_PickedSurf9, P, -2.662e+07
**
** OUTPUT REQUESTS
**
*Restart, write, frequency=0
**
** FIELD OUTPUT: F-Output-1
**
*Output, field, variable=PRESELECT
**
** HISTORY OUTPUT: H-Output-2
**
*Output, history
*Node Output, nset=RVE2DComposite.Frontface
COOR1, COOR2, RF1, RF2, U1, U2
*Element Output, elset=RVE2DComposite.Frontface
E11, E12, E22, MISES, S11, S12, S22
**
** HISTORY OUTPUT: H-Output-1
**
*Output, history, variable=PRESELECT
*End Step
