*Heading
** Job name: UDComposite Model name: Model-1
** Generated by: Abaqus/CAE Student Edition 6.13-2
*Preprint, echo=NO, model=NO, history=NO, contact=NO
**
** PARTS
**
*Part, name=UDComposite
*Node
      1,          50.,   32.2917976
      2,          50.,   45.7082024
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*Element, type=CPS3
  1, 385, 379, 368
  2, 296, 254, 253
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*Nset, nset=Set-1
   1,   2,   3,   4,   5,   6
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*Elset, elset=Set-1, generate
   1,  644,    1
*Nset, nset=Set-2
   1,   2,   5,   6,   7,  10
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*Elset, elset=Set-2, generate
 645,  914,    1
** Section: Section-2
*Solid Section, elset=Set-1, material=matrix
,
** Section: Section-1
*Solid Section, elset=Set-2, material=fibre
,
*End Part
**
**
** ASSEMBLY
**
*Assembly, name=Assembly
**
*Instance, name=UDComposite-1, part=UDComposite
*End Instance
**
*End Assembly
**
** MATERIALS
**
*Material, name=fibre
*Elastic
 7.5e+10, 0.2
*Material, name=matrix
*Elastic
 1.4e+09, 0.4
** ----------------------------------------------------------------
**
** STEP: Step-1
**
*Step, name=Step-1, nlgeom=NO
*Static
1., 1., 1e-05, 1.
**
** OUTPUT REQUESTS
**
*Restart, write, frequency=0
**
** FIELD OUTPUT: F-Output-1
**
*Output, field, variable=PRESELECT
**
** HISTORY OUTPUT: H-Output-1
**
*Output, history, variable=PRESELECT
*End Step
