*Heading
** Job name: UDComposite_Sim Model name: Model-1
** Generated by: Abaqus/CAE Student Edition 6.13-2
*Preprint, echo=NO, model=NO, history=NO, contact=NO
**
** PARTS
**
*Part, name=UDComposite
*Node
      1,          50.,   32.2917976
      2,          50.,   45.7082024
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*Element, type=CPS3
  1, 213,  17, 212
  2, 212,  17,  18
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*Nset, nset=Set-1
   1,   2,   3,   4,   5,   6
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*Elset, elset=Set-1, generate
   1,  954,    1
*Nset, nset=Set-2
   1,   2,   5,   6,   7,  10
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*Elset, elset=Set-2, generate
  955,  1406,     1
** Section: Section-1
*Solid Section, elset=Set-1, material=Material-1
,
** Section: Section-2
*Solid Section, elset=Set-2, material=Material-2
,
*End Part
**
**
** ASSEMBLY
**
*Assembly, name=Assembly
**
*Instance, name=UDComposite-1, part=UDComposite
*End Instance
**
*End Assembly
**
** MATERIALS
**
*Material, name=Material-1
*Material, name=Material-2
