*Heading
** Job name: RVE2DVoided Model name: Model-1
** Generated by: Abaqus/CAE Student Edition 6.13-2
*Preprint, echo=NO, model=NO, history=NO, contact=NO
**
** PARTS
**
*Part, name=RVE2DVoided
*Node
      1,  -13.5983496,  -18.3838844
      2,       -13.75,       -16.25
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*Element, type=CPS3
  1,  83,  44,  62
  2, 187,  83,  89
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*Nset, nset=Set-3, generate
   1,  202,    1
*Elset, elset=Set-3, generate
   1,  352,    1
** Section: steelSect
*Solid Section, elset=Set-3, material=steel
,
*End Part
**
**
** ASSEMBLY
**
*Assembly, name=Assembly
**
*Instance, name=RVE2DVoided-1, part=RVE2DVoided
*End Instance
**
*End Assembly
**
** MATERIALS
**
*Material, name=steelMat
*Elastic
 2.1e+11, 0.3
