*Heading
** Job name: LShapeHeat Model name: Model-1
**
** PARTS
**
*Part, name=Part-1
*End Part
**
** ASSEMBLY
**
*Assembly, name=Assembly
**
*Instance, name=Part-1-1, part=Part-1
*Node
      1,         0.03,           0.
      2,         0.03,        0.015
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*Element, type=DC2D3
1, 490, 474, 465
440, 708, 701, 702
*Element, type=DC2D4
  2,  17,  18, 128, 185
  3,  29,  30, 130, 129
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** Region: (Section-1:Picked)
*Elset, elset=_I1, internal, generate
   1,  439,    1
** Section: Section-1
*Solid Section, elset=_I1, material=Material-1
1.,
** Region: (Section-2:Picked)
*Elset, elset=_I2, internal, generate
 440,  655,    1
** Section: Section-2
*Solid Section, elset=_I2, material=Material-2
1.,
*End Instance
*Nset, nset=_PickedSet6, internal, instance=Part-1-1
   1,   2,   3,   4,   5,   8
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*Elset, elset=_PickedSet6, internal, instance=Part-1-1, generate
   1,  439,    1
*Nset, nset=_PickedSet7, internal, instance=Part-1-1
   1,   5,   6,  74,  75,  76
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*Elset, elset=_PickedSet7, internal, instance=Part-1-1
  10,  13,  16,  20,  21,  52
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*Elset, elset=__PickedSurf4_S1, internal, instance=Part-1-1
   3,   4,   5,   6,  14,  23
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*Elset, elset=__PickedSurf4_S3, internal, instance=Part-1-1
 32, 35, 36, 37, 41, 44, 48, 73
*Elset, elset=__PickedSurf4_S4, internal, instance=Part-1-1
  36, 118, 441, 442, 449, 464, 473, 492, 495, 520
*Elset, elset=__PickedSurf4_S2, internal, instance=Part-1-1
 117, 443, 447, 448, 466, 477, 496, 501, 505, 507, 529, 533, 538
*Surface, type=ELEMENT, name=_PickedSurf4, internal
__PickedSurf4_S1, S1
__PickedSurf4_S3, S3
__PickedSurf4_S4, S4
__PickedSurf4_S2, S2
*Elset, elset=__PickedSurf5_S4, internal, instance=Part-1-1
  12,  17,  43,  48,  49,  53,  56,  79, 113, 119
*Elset, elset=__PickedSurf5_S2, internal, instance=Part-1-1
   8,  11,  77, 120
*Elset, elset=__PickedSurf5_S1, internal, instance=Part-1-1
 59,
*Surface, type=ELEMENT, name=_PickedSurf5, internal
__PickedSurf5_S4, S4
__PickedSurf5_S2, S2
__PickedSurf5_S1, S1
*End Assembly
**
** MATERIALS
**
*Material, name=Material-1
*Conductivity
45.,
*Material, name=Material-2
*Conductivity
25.,
** ----------------------------------------------------------------
**
** STEP: Step-1
**
*Step, name=Step-1, amplitude=RAMP
*Heat Transfer, steady state, deltmx=0.
1., 1., 1e-05, 1.,
**
** BOUNDARY CONDITIONS
**
** Name: BC-1 Type: Temperature
*Boundary
_PickedSet7, 11, 11, 110.
**
** LOADS
**
** Name: Load-1   Type: Surface heat flux
*Dsflux
_PickedSurf5, S, 8000.
** Name: Load-2   Type: Body heat flux
*Dflux
_PickedSet6, BF, 5e+06
**
** INTERACTIONS
**
** Interaction: Int-1
*Sfilm
_PickedSurf4, F, 20., 55.
**
** OUTPUT REQUESTS
**
*Restart, write, frequency=1
**
** FIELD OUTPUT: F-Output-2
**
*Output, field
*Node Output
NT,
*Element Output
HFL,
**
** FIELD OUTPUT: F-Output-1
**
*Output, field, variable=PRESELECT
**
** HISTORY OUTPUT: H-Output-1
**
*Output, history, variable=PRESELECT
*El Print, freq=999999
*Node Print, freq=999999
*End Step
