*Heading
** Job name: NotchedBeam Model name: Model-1
**
** PARTS
**
*Part, name=Part-1
*End Part
**
** ASSEMBLY
**
*Assembly, name=Assembly
**
*Instance, name=Part-1-1, part=Part-1
*Node
      1,           0.,           5.
      2,           6.,           5.
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*Element, type=CPS3
1, 363, 327, 317
*Element, type=CPS4
  2,  93,  94, 166, 103
  3,  77, 155, 154,  76
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** Region: (Section-1:Picked)
*Elset, elset=_I1, internal, generate
   1,  317,    1
** Section: Section-1
*Solid Section, elset=_I1, material=Material-1
4.,
*End Instance
*Nset, nset=_PickedSet5, internal, instance=Part-1-1
  1,  6, 87, 88, 89, 90, 91, 92, 93, 94, 95, 96, 97, 98, 99
*Elset, elset=_PickedSet5, internal, instance=Part-1-1
   2,   6,   7,   8,   9,  76,  78,  88, 148, 149, 153, 156, 228, 306
*Nset, nset=_PickedSet6, internal, instance=Part-1-1
  4,  5, 50, 51, 52, 53, 54, 55, 56, 57, 58, 59, 60
*Elset, elset=_PickedSet6, internal, instance=Part-1-1
  38,  39,  41,  42,  43,  44,  46,  51, 120, 121, 124, 132
*Elset, elset=__PickedSurf4_S3, internal, instance=Part-1-1
 51,
*Elset, elset=__PickedSurf4_S4, internal, instance=Part-1-1
   3,  14,  28,  32,  34,  48
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*Elset, elset=__PickedSurf4_S2, internal, instance=Part-1-1
  36,  96, 111, 143, 306
*Surface, type=ELEMENT, name=_PickedSurf4, internal
__PickedSurf4_S3, S3
__PickedSurf4_S4, S4
__PickedSurf4_S2, S2
*End Assembly
**
** MATERIALS
**
*Material, name=Material-1
*Elastic
 3e+07, 0.2
** ----------------------------------------------------------------
**
** STEP: Step-1
**
*Step, name=Step-1
*Static
1., 1., 1e-05, 1.
**
** BOUNDARY CONDITIONS
**
** Name: BC-1 Type: Symmetry/Antisymmetry/Encastre
*Boundary
_PickedSet5, XSYMM
** Name: BC-2 Type: Symmetry/Antisymmetry/Encastre
*Boundary
_PickedSet6, ENCASTRE
**
** LOADS
**
** Name: Load-1   Type: Pressure
*Dsload
_PickedSurf4, P, 50.
**
** OUTPUT REQUESTS
**
*Restart, write, frequency=1
**
** FIELD OUTPUT: F-Output-1
**
*Output, field, variable=PRESELECT
**
** FIELD OUTPUT: F-Output-2
**
*Output, field
*Node Output
U, RF
*Element Output
S, LOADS
**
** HISTORY OUTPUT: H-Output-1
**
*Output, history, variable=PRESELECT
*El Print, freq=999999
*Node Print, freq=999999
*End Step
